# Интерполяция кусочно-линейным методом:
res_line := READPRN("C:\Users\Daniil\Desktop\LabOptics\Laba3/Line.txt")
# Интерполяция кусочно-квадратичным методом:
square := READPRN("C:\Users\Daniil\Desktop\LabOptics\Laba3/Square.txt")
# Интерполяция методом Ньютона:
Newton := READPRN("C:\Users\Daniil\Desktop\LabOptics\Laba3/Newton.txt")
# Интерполяция методом Лагранжа:
Lagrange := READPRN("C:\Users\Daniil\Desktop\LabOptics\Laba3/Lagrange.txt")
dim := rows(res_line)
i := 0 .. dim - 1
# Исходная функция:
f(x) := sin(x)/x
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# Среднеквадратическое отклонение:
SKW := READPRN("C:\Users\Daniil\Desktop\LabOptics\Laba3/skv.txt")
# Интерполяция кусочно-линейным методом:
SKW[0] = 0.011557
# Интерполяция кусочно-квадратичным методом:
SKW[1] = 0.00445765
# Интерполяция методом Ньютона:
SKW[2] = 0.000190818
# Интерполяция методом Лагранжа:
SKW[3] = 0.000190818
